// SBML level 3 version 2

model biocrnpyler_111243()
  // model units - substance: mole, time: second, volume: litre, area: square_metre, length: metre, extent: mole

  // Compartments:
  compartment default_atp_usebiocrnpyler_111243 = 1e-6;

  // Species:
  species metabolite_adp_atp_usebiocrnpyler_111243 in default_atp_usebiocrnpyler_111243 = 0;
  species metabolite_atp_atp_usebiocrnpyler_111243 in default_atp_usebiocrnpyler_111243 = 10/default_atp_usebiocrnpyler_111243;
  species metabolite_pi_atp_usebiocrnpyler_111243 in default_atp_usebiocrnpyler_111243 = 0;

  // Reactions:
  r0_atp_usebiocrnpyler_111243: metabolite_atp_atp_usebiocrnpyler_111243 => metabolite_adp_atp_usebiocrnpyler_111243 + metabolite_pi_atp_usebiocrnpyler_111243; k*metabolite_atp_atp_usebiocrnpyler_111243;
    k = 75;

  // Unit definitions:
  unit square_metre = metre^2;
end
